*Heading
** Job name: bolt_dummy Model name: Model-1
** Generated by: Abaqus/CAE 2022
*Preprint, echo=NO, model=NO, history=NO, contact=NO
**
** PARTS
**
*Part, name=Bolt_dummy
*Node
      1,           6.,          15.,           0.
      2,           0.,          15.,          -6.
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*Element, type=C3D8R
  1,  1607,  1608, 10204, 10195,    76,    75,  1538,  1537
  2,  1608,  1609, 10205, 10204,    75,    74,  1539,  1538
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*Nset, nset=_PickedSet17, internal, generate
     1,  23868,      1
*Elset, elset=_PickedSet17, internal, generate
     1,  21304,      1
** Section: solid
*Solid Section, elset=_PickedSet17, material=solid
,
*End Part
**
**
** ASSEMBLY
**
*Assembly, name=Assembly
**
*Instance, name=Bolt_dummy-1, part=Bolt_dummy
*End Instance
**
*End Assembly
**
** MATERIALS
**
*Material, name=solid
